OpenVSP model (file version 5), 1 components.
Geometry view with OpenVSP parameter names; values to 6 digits, angles in degrees, lengths in the model's unit.
Overall bounding box: X_Min=-7.20607e-07 X_Len=0.636001 Y_Min=-3.8145 Y_Len=7.629 Z_Min=-0.0399525 Z_Len=0.121524

Wing "Main_wing_base"
  location (X Y Z) 0 0 0, rotation 0 0 0
  symmetric about XZ
  bounding box size 0.636001 7.629 0.121524
  totals: TotalSpan=7.629 TotalProjectedSpan=7.629 TotalChord=0.636 TotalArea=4.85204 TotalAR=11.9953
  root: chord 0.636, twist 0, airfoil file "EPPLER 1098 AIRFOIL"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 BaseThickChord=0.18982 ThickChord=0.18982
  sections:
    n  Span    Root_Chord  Tip_Chord  Area      Sweep  Sweep_Location  Dihedral  Twist  Twist_Location  tip airfoil
    1  0.8     0.636       0.636      0.5088    0      0.25            0         0      0.4             as above
    2  0.8     0.636       0.636      0.5088    0      0.25            0         0      0.4             as above
    3  0.7     0.636       0.636      0.4452    0      0.25            0         0      0.4             as above
    4  0.6     0.636       0.636      0.3816    0      0.25            0         0      0.4             as above
    5  0.5     0.636       0.636      0.318     0      0.25            0         0      0.4             as above
    6  0.3     0.636       0.636      0.1908    0      0.25            0         0      0.4             as above
    7  0.1145  0.636       0.636      0.072822  0      0.25            0         0      0.4             as above

VSPAERO settings: Sref=4.85204 bref=7.629 cref=0.636 Xcg=0 Ycg=0 Zcg=0 AlphaStart=1 AlphaEnd=10 AlphaNpts=3 BetaStart=0 BetaEnd=0 BetaNpts=1 MachStart=0 MachEnd=0 MachNpts=1 ReCref=1e+07 Vinf=100 Rho=0.002377
